*Heading
** Job name: Job-2 Model name: Model-1-hole
** Generated by: Abaqus/CAE 2019
*Preprint, echo=NO, model=NO, history=NO, contact=NO
**
** PARTS
**
*Part, name=plate
*End Part
**
**
** ASSEMBLY
**
*Assembly, name=Assembly
**
*Instance, name=plate-1, part=plate
*Node
      1,          90.,         100.,           0.
      2,          90.,          90.,           0.
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*Element, type=C3D8R
  1,    8,  219, 2364,  308,    1,   35, 1653,  210
  2,  219,  218, 2365, 2364,   35,   36, 1654, 1653
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*Nset, nset=Set-1, generate
     1,  20358,      1
*Elset, elset=Set-1, generate
    1,  9962,     1
** Section: alu
*Solid Section, elset=Set-1, material=alumni
,
*End Instance
**
*Nset, nset=Fr, instance=plate-1
 6,
*Nset, nset=Se, instance=plate-1
 24,
*Nset, nset=Set-1, instance=plate-1
    1,    4,    7,    8,    9,   11
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*Elset, elset=Set-1, instance=plate-1
    1,   11,   21,   31,   41,   51
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*End Assembly
*Amplitude, name=Amp-1
             0.,              0.,           2e-06,             -1.,           4e-06,              1.,           6e-06,             -1.
          8e-06,              1.,           1e-05,              0.
**
** MATERIALS
**
*Material, name=alumni
*Density
 2.5e-09,
*Elastic
62000., 0.33
** ----------------------------------------------------------------
**
** STEP: Step-1
**
*Step, name=Step-1, nlgeom=YES
*Dynamic, Explicit
, 0.0001,, 1e-07
*Bulk Viscosity
0.06, 1.2
**
** BOUNDARY CONDITIONS
**
** Name: BC-1 Type: Displacement/Rotation
*Boundary
Set-1, 1, 1
Set-1, 2, 2
Set-1, 3, 3
**
** LOADS
**
** Name: Load-1   Type: Concentrated force
*Cload, amplitude=Amp-1
Fr, 3, 1.
**
** OUTPUT REQUESTS
**
*Restart, write, number interval=1, time marks=NO
**
** FIELD OUTPUT: F-Output-1
**
*Output, field, variable=PRESELECT
**
** FIELD OUTPUT: F-Output-2
**
*Output, field, number interval=100
*Node Output
U,
**
** HISTORY OUTPUT: H-Output-2
**
*Output, history, frequency=1
*Node Output, nset=Se
U1, U2, U3, UR1, UR2, UR3
**
** HISTORY OUTPUT: H-Output-1
**
*Output, history, variable=PRESELECT
*End Step
